// COMSOL Multiphysics 6.4.0.378 model "steady_airflow_template.mph"
// Outline of the model tree

Parameters
  p_out = 0[Pa]  // Pressure outlet (top)
  p_ref = 1[atm]  // Reference pressure for fluid properties
  Lx = 1.2[m]  // Domain width
  Ly = 0.75[m]  // Domain height
  Lz = 0.8[m]  // Out-of-plane thickness of 2D domain
  Nx = 401  // Number of grid points along x-direction
  Ny = 251  // Number of grid points along y-direction
  T_flow_ref = 27.5[°C]  // Reference temperature for frozen airflow properties

Functions
  int1: Interpolation "Spatial Case Fields"
    importedname = case_0001.csv
    funcnametable = {int1, 1}
    source = file
    filename = fields.csv
    filecolumns = 7
    columnKeys = {col1, col2, col3, col4, col5, col6, col7}
    columnType = {col1, arg, col2, arg, col3, value, col4, value, col5, value, col6, value, col7, value}
    funcnames = {col1, int1a, col2, int1, col3, Kxx_file, col4, Kxy_file, col5, Kyy_file, col6, eps_bed_file, col7, p_in_bc_file}
    fununit = {m^2, m^2, m^2, , Pa}
    argunit = {m, m}
    plotfuncname = Kxx_file

Variables
  var2 "Variables 1 - Imported Fields"
    Kxx = Kxx_file(x,y)  // Local xx-component of permeability tensor
    Kxy = Kxy_file(x,y)  // Local xy-component of permeability tensor
    Kyy = Kyy_file(x,y)  // Local yy-component of permeability tensor
    eps_bed = eps_bed_file(x,y)  // Local intergranular porosity of packed bed
    p_in_bc = p_in_bc_file(x,y)  // Inlet pressure boundary-condition field

Geometry
  geom1 "Geometry 1" (2D, length unit m)
    r1: Rectangle | size = {Lx, Ly}
    fin: Finalize "Form Union"

Materials
  mat1: Common "Air" on all domains
    def: def "Basic"
      thermalexpansioncoefficient = alpha_p(pA,T)
      molarmass = 0.02897[kg/mol]
      bulkviscosity = muB(T)
      relpermeability = 1
      relpermittivity = 1
      dynamicviscosity = eta(T)
      ratioofspecificheat = 1.4
      electricconductivity = 0[S/m]
      heatcapacity = Cp(T)
      density = rho(pA,T)
      thermalconductivity = k(T)
      soundspeed = cs(T)
      porosity = eps_bed
      eta: Piecewise | arg = T; pieces = {200.0, 1600.0, -8.38278E-7+8.35717342E-8*T^1-7.69429583E-11*T^2+4.6437266E-14*T^3-1.06585607E-17*T^4}; argunit = K; fununit = Pa*s
      Cp: Piecewise | arg = T; pieces = {200.0, 1600.0, 1047.63657-0.372589265*T^1+9.45304214E-4*T^2-6.02409443E-7*T^3+1.2858961E-10*T^4}; argunit = K; fununit = J/(kg*K)
      rho: Analytic | expr = pA*0.02897/R_const[K*mol/J]/T; args = {pA, T}; fununit = kg/m^3; argunit = {Pa, K}
      k: Piecewise | arg = T; pieces = {200.0, 1600.0, -0.00227583562+1.15480022E-4*T^1-7.90252856E-8*T^2+4.11702505E-11*T^3-7.43864331E-15*T^4}; argunit = K; fununit = W/(m*K)
      cs: Analytic | expr = sqrt(1.4*R_const[K*mol/J]/0.02897*T); args = T; fununit = m/s; argunit = K
      an1: Analytic | funcname = alpha_p; expr = -1/rho(pA,T)*d(rho(pA,T),T); args = {pA, T}; fununit = 1/K; argunit = {Pa, K}
      an2: Analytic "Analytic 2a" | funcname = muB; expr = 0.6*eta(T); args = T; fununit = Pa*s; argunit = K
    RefractiveIndex: RefractiveIndex
      n = 1
      ki = 0
    NonlinearModel: NonlinearModel
      BA = def.gamma-1
    idealGas: idealGas
      Rs = R_const/Mn
      heatcapacity = Cp(T)
      ratioofspecificheat = 1.4
      molarmass = 0.02897[kg/mol]
      Cp: Piecewise | arg = T; pieces = {200.0, 1600.0, 1047.63657-0.372589265*T^1+9.45304214E-4*T^2-6.02409443E-7*T^3+1.2858961E-10*T^4}; argunit = K; fununit = J/(kg*K)

Physics
  br: PorousMediaFlowBrinkman "Brinkman Equations" on all domains
    dependent variable u = {u, v, w}
    PhysicalModelProperty.PorousWallTreatment = PorousResolvedWall
    PhysicalModelProperty.Tref = T_flow_ref
    PhysicalModelProperty.pref = p_ref
    TurbulenceModelProperty.c4_PS_om = ((9*0.52)+6)/11
    TurbulenceModelProperty.c5_PS_om = (10-(7*0.52))/11
    porous1: PorousMedium (default)
      fluid1: FluidPorousMedium "Fluid 1" (default) | minput_temperature = T_flow_ref
      pm1: PorousMatrixPorousMedium "Porous Matrix 1" (default)
        epsilon_p_mat = userdef
        epsilon_p = eps_bed
        kappa_mat = userdef
        kappa = {Kxx, Kxy, 0, Kxy, Kyy, 0, 0, 0, Kxx}
        minput_temperature = T_flow_ref
    init1: init "Initial Values 1" (default)
    wallbc1: WallBC "Wall 1" (default) | zeta = (-0.1)[V]
    inl1: InletBoundary "Inlet 1" on boundaries 2 | BoundaryCondition = Pressure; p0 = p_in_bc
    out1: OutletBoundary "Outlet 1" on boundaries 3 | p0 = p_out

Mesh
  mesh1 "Mesh 1"
    size: MeshSizeDefault | table = cfd
    size1: Size (disabled) on boundaries 1, 4 | table = cfd; hauto = 1
    cr1: CornerRefinement (disabled) on domains 1 | boundary = boundaries 1, 4
    ftri1: FreeTri "Free Triangular 1" (disabled) on remaining entities | smoothcontrol = on
    bl1: BndLayer "Boundary Layers 1" (disabled) on domains 1 | sharpcorners = trim
      blp1: BndLayerProp "Boundary Layer Properties 1" on boundaries 1, 4 | blnlayers = 2; blhminfact = 5
    dis1: Distribution on boundaries 2, 3 | numelem = Nx-1; equidistant = on
    dis2: Distribution on boundaries 1, 4 | numelem = Ny-1; equidistant = on
    map1: Map "Mapped 1" on domains 1 | smoothcontrol = on
    bl2: BndLayer "Boundary Layers 2" on entire geometry
      blp: BndLayerProp "Boundary Layer Properties" on boundaries 1, 4

Studies
  std1 "Stationary Airflow"
    stat: Stationary "Stationary Airflow Solver"

Solver configurations
  sol1 "Stationary Airflow Solution" (study std1)
    v1: Variables "Dependent Variables 1"
    s1: Stationary "Stationary Solver 1"
      fc1: FullyCoupled
      d1: Direct "Direct, fluid flow variables (br)"

Datasets
  dset1: Solution | solution = sol1

Plots
  pg14: PlotGroup2D "Porosity (eps_bed)" | data = dset1
    surf1: Surface | expr = eps_bed
  pg2: PlotGroup2D "Pressure (br)" | data = dset1
    surf1: Surface | expr = p
  pg1: PlotGroup2D "Velocity (br)" | data = dset1
    surf1: Surface | expr = br.U
    arws1: ArrowSurface (disabled) | expr = {u, v}; xnumber = 30; ynumber = 30; arrowlength = normalized
    str1: Streamline on boundaries 2
      expr = {u, v}
      pointtype = arrow
      arrowdistr = equaltime
      arrowcount = 77
      arrowlength = proportional
      arrowscale = 0.286930417201

Exports
  data1: Data "Export - Stationary Fields"
    data = dset1
    expr = {x, y, Kxx, Kxy, Kyy, eps_bed, p_in_bc, rho_bu_dry, p, u, v}
    unit = {m, m, m^2, m^2, m^2, , Pa, , Pa, m/s, m/s}
    descr = {x-coordinate, y-coordinate, Local xx-component of permeability tensor, Local xy-component of permeability tensor, Local yy-component of permeability tensor, Porosity, Pressure on boundary, Local dry granular-material mass per total packed-bed volume, Pressure, "Velocity field, x-component", "Velocity field, y-component"}
    filename = stationary_fields.csv
    location = grid
    gridx2 = range(0,(Lx-0)/(Nx-1),Lx)
    gridy2 = range(0,(Ly-0)/(Ny-1),Ly)
    includecoords = off
    separator = ,