// COMSOL Multiphysics 6.4.0.378 model "template_brinkman.mph"
// Outline of the model tree

Parameters
  Lx = 1.2[m]  // Domain width
  Ly = 0.75[m]  // Domain height
  Nx = 401  // Number of elements along x-direction
  Ny = 251  // Number of elements along y-direction
  p_out = 0[Pa]  // Pressure outlet (top)

Functions
  int1: Interpolation "int"
    importedname = case_0001.csv
    funcnametable = {int1, 1}
    source = file
    filename = C:\Users\rino.albertin\OneDrive - OST\2 MSE FHO DS\VP_Vertiefungsprojekt\grainlegumes-pino-airflow\data_generation\data\raw\lhs_var80_seed3001\case_0001.csv
    filecolumns = 7
    columnKeys = {col1, col2, col3, col4, col5, col6, col7}
    columnType = {col1, arg, col2, arg, col3, value, col4, value, col5, value, col6, value, col7, value}
    funcnames = {col1, int1a, col2, int1, col3, int1, col4, int2, col5, int3, col6, int4, col7, int5}
    fununit = {m^2, m^2, m^2, , Pa}
    argunit = {m, m}
    plotfuncname = int1
  int2: Interpolation "int1" (disabled)
    importedname = kappa_multiscale_mean5.0e-09_var0.50_corr0.050_ani3.0-1.0_log1_msW0.70-0.30_msS0.50_seed3.csv
    funcnametable = {int2, 1}
    source = file
    filename = C:\Users\rino.albertin\OneDrive - OST\2 MSE FHO DS\VP_Vertiefungsprojekt\grainlegumes-pino-airflow\data_generation\data\raw\lhs_var80_seed3001\case_0001.csv
    filecolumns = 7
    columnKeys = {col1, col2, col3, col4, col5, col6, col7}
    columnType = {col1, arg, col2, arg, col3, value, col4, none, col5, none, col6, none, col7, none}
    funcnames = {col1, int2a2, col2, int2, col3, int1, col4, int2, col5, int3, col6, int2, col7, int2}
    fununit = m^2
    argunit = {m, m}
    plotfuncname = int1
  int3: Interpolation "int2" (disabled)
    importedname = kappa_multiscale_mean5.0e-09_var0.50_corr0.050_ani3.0-1.0_log1_msW0.70-0.30_msS0.50_seed3.csv
    funcnametable = {int2, 1}
    source = file
    filename = C:\Users\rino.albertin\OneDrive - OST\2 MSE FHO DS\VP_Vertiefungsprojekt\grainlegumes-pino-airflow\data_generation\data\raw\lhs_var80_seed3001\case_0001.csv
    funcname = int2
    filecolumns = 7
    columnKeys = {col1, col2, col3, col4, col5, col6, col7}
    columnType = {col1, arg, col2, arg, col3, none, col4, value, col5, none, col6, none, col7, none}
    funcnames = {col1, int3a2, col2, int2, col3, int1, col4, int2, col5, int3, col6, int3, col7, int3}
    fununit = m^2
    argunit = {m, m}
    plotfuncname = int2
  int4: Interpolation "int3" (disabled)
    importedname = kappa_multiscale_mean5.0e-09_var0.50_corr0.050_ani3.0-1.0_log1_msW0.70-0.30_msS0.50_seed3.csv
    funcnametable = {int2, 1}
    source = file
    filename = C:\Users\rino.albertin\OneDrive - OST\2 MSE FHO DS\VP_Vertiefungsprojekt\grainlegumes-pino-airflow\data_generation\data\raw\lhs_var80_seed3001\case_0001.csv
    funcname = int2
    filecolumns = 7
    columnKeys = {col1, col2, col3, col4, col5, col6, col7}
    columnType = {col1, arg, col2, arg, col3, none, col4, none, col5, value, col6, none, col7, none}
    funcnames = {col1, int4a2, col2, int2, col3, int4, col4, int2, col5, int3, col6, int4, col7, int4}
    fununit = m^2
    argunit = {m, m}
    plotfuncname = int3
  int5: Interpolation "int4" (disabled)
    importedname = kappa_multiscale_mean5.0e-09_var0.50_corr0.050_ani3.0-1.0_log1_msW0.70-0.30_msS0.50_seed3.csv
    funcnametable = {int5, 1}
    source = file
    filename = C:\Users\rino.albertin\OneDrive - OST\2 MSE FHO DS\VP_Vertiefungsprojekt\grainlegumes-pino-airflow\data_generation\data\raw\lhs_var80_seed3001\case_0001.csv
    filecolumns = 7
    columnKeys = {col1, col2, col3, col4, col5, col6, col7}
    columnType = {col1, arg, col2, arg, col3, none, col4, none, col5, none, col6, value, col7, none}
    funcnames = {col1, int5a2, col2, int5, col3, int5, col4, int5, col5, int5, col6, int4, col7, int5}
    argunit = {m, m}
    plotfuncname = int4
  int6: Interpolation "int5" (disabled)
    importedname = kappa_multiscale_mean5.0e-09_var0.50_corr0.050_ani3.0-1.0_log1_msW0.70-0.30_msS0.50_seed3.csv
    funcnametable = {int6, 1}
    source = file
    filename = C:\Users\rino.albertin\OneDrive - OST\2 MSE FHO DS\VP_Vertiefungsprojekt\grainlegumes-pino-airflow\data_generation\data\raw\lhs_var80_seed3001\case_0001.csv
    filecolumns = 7
    columnKeys = {col1, col2, col3, col4, col5, col6, col7}
    columnType = {col1, arg, col2, arg, col3, none, col4, none, col5, none, col6, none, col7, value}
    funcnames = {col1, int6a2, col2, int6, col3, int6, col4, int6, col5, int6, col6, int6, col7, int5}
    fununit = Pa
    argunit = {m, m}
    plotfuncname = int5

Geometry
  geom1 "Geometry 1" (2D, length unit m)
    r1: Rectangle | size = {Lx, Ly}
    fin: Finalize "Form Union"

Materials
  mat1: Common "Air" on all domains
    def: def "Basic"
      thermalexpansioncoefficient = alpha_p(pA,T)
      molarmass = 0.02897[kg/mol]
      bulkviscosity = muB(T)
      relpermeability = 1
      relpermittivity = 1
      dynamicviscosity = eta(T)
      ratioofspecificheat = 1.4
      electricconductivity = 0[S/m]
      heatcapacity = Cp(T)
      density = rho(pA,T)
      thermalconductivity = k(T)
      soundspeed = cs(T)
      porosity = int4(x,y)
      hydraulicpermeability = kappa
      eta: Piecewise | arg = T; pieces = {200.0, 1600.0, -8.38278E-7+8.35717342E-8*T^1-7.69429583E-11*T^2+4.6437266E-14*T^3-1.06585607E-17*T^4}; argunit = K; fununit = Pa*s
      Cp: Piecewise | arg = T; pieces = {200.0, 1600.0, 1047.63657-0.372589265*T^1+9.45304214E-4*T^2-6.02409443E-7*T^3+1.2858961E-10*T^4}; argunit = K; fununit = J/(kg*K)
      rho: Analytic | expr = pA*0.02897/R_const[K*mol/J]/T; args = {pA, T}; fununit = kg/m^3; argunit = {Pa, K}
      k: Piecewise | arg = T; pieces = {200.0, 1600.0, -0.00227583562+1.15480022E-4*T^1-7.90252856E-8*T^2+4.11702505E-11*T^3-7.43864331E-15*T^4}; argunit = K; fununit = W/(m*K)
      cs: Analytic | expr = sqrt(1.4*R_const[K*mol/J]/0.02897*T); args = T; fununit = m/s; argunit = K
      an1: Analytic | funcname = alpha_p; expr = -1/rho(pA,T)*d(rho(pA,T),T); args = {pA, T}; fununit = 1/K; argunit = {Pa, K}
      an2: Analytic "Analytic 2a" | funcname = muB; expr = 0.6*eta(T); args = T; fununit = Pa*s; argunit = K
    RefractiveIndex: RefractiveIndex
      n = 1
      ki = 0
    NonlinearModel: NonlinearModel
      BA = def.gamma-1
    idealGas: idealGas
      Rs = R_const/Mn
      heatcapacity = Cp(T)
      ratioofspecificheat = 1.4
      molarmass = 0.02897[kg/mol]
      Cp: Piecewise | arg = T; pieces = {200.0, 1600.0, 1047.63657-0.372589265*T^1+9.45304214E-4*T^2-6.02409443E-7*T^3+1.2858961E-10*T^4}; argunit = K; fununit = J/(kg*K)

Physics
  br: PorousMediaFlowBrinkman "Brinkman Equations" on all domains
    dependent variable u = {u, v, w}
    PhysicalModelProperty.PorousWallTreatment = PorousResolvedWall
    TurbulenceModelProperty.c4_PS_om = ((9*0.52)+6)/11
    TurbulenceModelProperty.c5_PS_om = (10-(7*0.52))/11
    porous1: PorousMedium (default)
      fluid1: FluidPorousMedium "Fluid 1" (default)
        fluid = dommat
        Constitutiverelation = Newtonian
        nonNewtonianModels = PowerLaw
        sr_ref = 1[1/s]
        sr_lowlimit = 0.01[1/s]
        m_p = 10[s]
        mu_init_app = br.mu0e
        kf = 1[1/s]
        kb = 1[1/s]
        m_y0 = 1e-3[Pa*s]
        m_yt = 0[Pa*s]
        tau_y0 = 0[N/m^2]
        tau_yt = 0[N/m^2]
        nb = 1
        nf = 1
        alpha = 1
        C = 4
        Twlf = 293.15[K]
        C1wlf = 8.86
        C2wlf = 51.6[K]
        T0 = 293.15[K]
        alphaT = 1
        shift_temperature = br.Tref
      pm1: PorousMatrixPorousMedium "Porous Matrix 1" (default)
        kappa_mat = userdef
        kappa = {int1(x,y), int2(x,y), 0, int2(x,y), int3(x,y), 0, 0, 0, int1(x,y)}
    init1: init "Initial Values 1" (default)
    wallbc1: WallBC "Wall 1" (default) | zeta = (-0.1)[V]
    inl1: InletBoundary "Inlet 1" on boundaries 2 | BoundaryCondition = Pressure; p0 = int5(x,y)
    out1: OutletBoundary "Outlet 1" on boundaries 3 | p0 = p_out

Mesh
  mesh1 "Mesh 1"
    size: MeshSizeDefault | table = cfd
    size1: Size (disabled) on boundaries 1, 4 | table = cfd; hauto = 1
    cr1: CornerRefinement (disabled) on domains 1 | boundary = boundaries 1, 4
    ftri1: FreeTri "Free Triangular 1" (disabled) on remaining entities | smoothcontrol = on
    bl1: BndLayer "Boundary Layers 1" (disabled) on domains 1 | sharpcorners = trim
      blp1: BndLayerProp "Boundary Layer Properties 1" on boundaries 1, 4 | blnlayers = 2; blhminfact = 5
    dis1: Distribution on boundaries 2, 3 | numelem = Nx
    dis2: Distribution on boundaries 1, 4 | numelem = Ny
    map1: Map "Mapped 1" on domains 1 | smoothcontrol = on
    bl2: BndLayer "Boundary Layers 2" on entire geometry
      blp: BndLayerProp "Boundary Layer Properties" on boundaries 1, 4

Studies
  std1 "study1"
    stat: Stationary | pname = Lx; punit = m

Solver configurations
  sol1 "Solution 1" (study std1)
    v1: Variables "Dependent Variables 1"
    s1: Stationary "Stationary Solver 1"
      fc1: FullyCoupled
      d1: Direct "Direct, fluid flow variables (br)"

Datasets
  dset1: Solution | solution = sol1
  int2_ds1: Grid2D
    function = int2
    data = none
    par1 = gridx
    parmax1 = 1.2
    par2 = gridy
    parmax2 = 0.75
    defineauxvars = on
    auxvar1 = x
    auxunit1 = m
    auxvar2 = y
    auxunit2 = m

Plots
  pg1: PlotGroup2D "Velocity (br)" | data = dset1
    surf1: Surface | expr = br.U
    arws1: ArrowSurface (disabled) | expr = {u, v}; xnumber = 30; ynumber = 30; arrowlength = normalized
    str1: Streamline on boundaries 2
      expr = {u, v}
      pointtype = arrow
      arrowdistr = equaltime
      arrowcount = 77
      arrowlength = proportional
      arrowscale = 0.209013328344
  pg2: PlotGroup2D "Pressure (br)" | data = dset1
    surf1: Surface | expr = p

Exports
  data1: Data
    data = dset1
    expr = {x, y, br.kappaxx, br.kappayx, br.kappazx, br.kappaxy, br.kappayy, br.kappazy, br.kappaxz, br.kappayz, br.kappazz, int4(x, y), int5(x, y), br.U, u, v, p}
    unit = {m, m, m^2, m^2, m^2, m^2, m^2, m^2, m^2, m^2, m^2, , Pa, m/s, m/s, m/s, Pa}
    descr = {x-coordinate, y-coordinate, "Permeability, xx-component", "Permeability, yx-component", "Permeability, zx-component", "Permeability, xy-component", "Permeability, yy-component", "Permeability, zy-component", "Permeability, xz-component", "Permeability, yz-component", "Permeability, zz-component", Porosity, Pressure on boundary, Velocity magnitude, "Velocity field, x-component", "Velocity field, y-component", Pressure}
    filename = C:\Users\rino.albertin\OneDrive - OST\2 MSE FHO DS\VP_Vertiefungsprojekt\grainlegumes-pino-airflow\data_generation\comsol\res.csv
    location = grid
    gridx2 = range(0,(Lx-0)/(Nx-1),Lx)
    gridy2 = range(0,(Ly-0)/(Ny-1),Ly)
    separator = ,