// COMSOL Multiphysics 6.4.0.378 model "transient_drying_template.mph"
// Outline of the model tree

Parameters
  p_out = 0[Pa]  // Pressure outlet (top)
  p_ref = 1[atm]  // Reference pressure for fluid properties
  T_init = T_amb  // Inital bed and pore-air temperature
  T_amb = 20[°C]  // Abient temperature outside container
  eps_bed_cal_ref = 0.3125  // Reference porosity associated with rho_bu_dry_ref
  rho_bu_dry_ref = 630[kg/m^3]  // Reference dry bulk density at eps_bed_cal_ref
  k_gr = 0.364[W/(m*K)]  // Dry granular-phase thermal conductivity used in the Maxwell-Eucken model
  cp_gr_dry = 2000[J/(kg*K)]  // Specific heat capacity of dry granular material
  cp_w = 4180[J/(kg*K)]  // Specific heat capacity of water bound in the granular material
  h_fg = 2.4182e6[J/kg]  // Latent heat of evaporation of water
  d_wall = 19[mm]  // Container wall thickness
  k_wall = 0.13[W/(m*K)]  // Container wall thermal conductivity
  h_ext = 8[W/(m^2*K)]  // External convetive heat transfer coefficient
  D_v_air = 2.811e-5[m^2/s]  // Water vapor diffusion coefficient in free air
  M_v = 18.01528e-3[kg/mol]  // Molar mass of water vapor
  X_target_wb = 0.135  // Target moisture content of the granular material on wet basis
  r_surf_0 = 1.0e-5[1/s]  // Reference effective surface-to-air moisture relexation rate
  r_int_surf = 0.2  // Ratio of internal-to-surface moisture relaxation rates, r_int/r_surf
  f_surf = 0.5  // Fraction of total material water assigned to the effective surface compartment
  A_osw = 13.89757  // Oswin parameter controlling moisture level
  U_wall = 1/(d_wall/k_wall+1/h_ext)  // Overall heat transfer coefficient through wall to ambient
  Lx = 1.2[m]  // Domain width
  Ly = 0.75[m]  // Domain height
  Lz = 0.8[m]  // Out-of-plane thickness of 2D domain
  Nx = 401  // Number of grid points along x-direction
  Ny = 251  // Number of grid points along y-direction
  dt_out = 1[h]  // Uniform output interval for neural-operator dataset
  t_max = 168[h]  // Maximum simulated drying duration
  B_osw = -0.07600[1/K]  // Oswin parameter describing temperature dependence
  C_osw = 0.35266  // Oswin parameter controlling isotherm curvature
  f_wet_dm_max = 0.05  // Maximum dry-mass fraction above target moisture
  T_flow_ref = 27.5[°C]  // Reference temperature for frozen airflow properties

Functions
  int1: Interpolation "Spatial Case Fields"
    importedname = case_0001.csv
    funcnametable = {int1, 1}
    source = file
    filename = fields.csv
    filecolumns = 8
    columnKeys = {col1, col2, col3, col4, col5, col6, col7, col8}
    columnType = {col1, arg, col2, arg, col3, value, col4, value, col5, value, col6, value, col7, value, col8, value}
    funcnames = {col1, int1a, col2, int1, col3, Kxx_file, col4, Kxy_file, col5, Kyy_file, col6, eps_bed_file, col7, p_in_bc_file, col8, X_0_db_file}
    fununit = {m^2, m^2, m^2, , Pa, kg/kg}
    argunit = {m, m}
    plotfuncname = Kxx_file
  int7: Interpolation "Inlet Schedule"
    importedname = case_0001.csv
    funcnametable = {int1, 1}
    source = file
    filename = schedule.csv
    funcname = int1
    filecolumns = 4
    columnKeys = {col1, col2, col3, col4}
    columnType = {col1, arg, col2, value, col3, value, col4, value}
    funcnames = {col1, int7a7, col2, T_in_bc_file, col3, omega_in_bc_file, col4, phi_in_bc_file}
    fununit = {K, kg/kg, }
    argunit = h
    plotfuncname = all

Variables
  var2 "Variables 1 - Imported Fields"
    Kxx = Kxx_file(x,y)  // Local xx-component of permeability tensor
    Kxy = Kxy_file(x,y)  // Local xy-component of permeability tensor
    Kyy = Kyy_file(x,y)  // Local yy-component of permeability tensor
    eps_bed = eps_bed_file(x,y)  // Local intergranular porosity of packed bed
    p_in_bc = p_in_bc_file(x,y)  // Inlet pressure boundary-condition field
    X_0_db_field = X_0_db_file(x,y)  // Local initial moisture content of the granular material on dry basis
  var6 "Variables 2 - Imported Inlet Schedule"
    T_in_bc = T_in_bc_file(t)  // Time-dependent inlet-air temperature imported from schedule.csv
    omega_in_bc = omega_in_bc_file(t)  // Time-dependent inlet humidity ratio imported from schedule.csv
    T_in_C = (T_in_bc-273.15[K])/1[K]  // Inlet-air temperature in degrees Celsius as a dimensionless numerical value
    p_sat_in = 610.94[Pa]*exp(17.625*T_in_C/(T_in_C+243.04))  // Saturation vapor pressure from the maintained Magnus relation
    p_v_in = p_ref*omega_in_bc/(0.621945+omega_in_bc)  // Inlet water-vapor partial pressure at the reference pressure
    phi_in_bc_raw = p_v_in/p_sat_in  // Thermodynamically reconstructed inlet relative humidity without clipping
    phi_in_bc = phi_in_bc_raw  // Inlet relative humidity used by the moisture boundary condition
    phi_in_bc_table = phi_in_bc_file(t)  // Tabulated inlet relative humidity imported from schedule.csv for audit only
    phi_in_bc_interp_error = phi_in_bc-phi_in_bc_table  // Difference between reconstructed and independently interpolated inlet relative humidity
  var3 "Variables 3 - Effective Packed-Bed Properties"
    rho_bu_dry = rho_bu_dry_ref*(1-eps_bed)/(1-eps_bed_cal_ref)  // Local dry granular-material mass per total packed-bed volume
    k_air = mat1.def.k_iso  // Local thermal conductivity of air
    k_eff = k_gr*(2*k_gr+k_air-2*eps_bed*(k_gr-k_air))/(2*k_gr+k_air+eps_bed*(k_gr-k_air))  // Effective thermal conductivity of packed bed
    cp_gr_eff = cp_gr_dry+X_db*cp_w  // Effective specific heat capacity per unit dry granular-material mass, including bound water
  var4 "Variables 4 - Moisture State and Equilibrium"
    w_gr_0 = rho_bu_dry*X_0_db_field  // Inital water mass in the granular material per total packed-bed volume
    osw_ratio_0 = (100*X_0_db_field/(A_osw+B_osw*(T_init-273.15[K])))^(1/C_osw)  // Initial Oswin humidity ratio phi/(1-phi)
    phi_init = osw_ratio_0/(1+osw_ratio_0)  // Inital relativ humidity in equilibrium with the inital material moisture
    w_v_gas = eps_bed*M_v*mt.csat*mt.phi  // Water-vapour mass in the pore gas per total packed-bed volume
    phi_eff = min(max(mt.phi,1e-6),0.999)  // Clamped relative humidity used for robust Oswin evaluation
    X_eq_db = 0.01*(A_osw + B_osw*(T-273.15[K]))*(phi_eff/(1-phi_eff))^C_osw  // Equilibrium moisture content of the granular material on dry basis, calculated from the Oswin isotherm
    w_eq = rho_bu_dry*X_eq_db  // Equilibrium moisture content per volume of packed bed
    w_gr = f_surf*w_surf+(1-f_surf)*w_int  // Total water mass in the granular material per total packed-bed volume
    X_db = w_gr/rho_bu_dry  // Local moisture content of the granular material on dry basis
    X_wb = X_db/(1+X_db)  // Local moisture content of the granular material on wet basis
  var5 "Variables 5 - Transfer and Sources"
    r_surf = r_surf_0  // Effective surface-to-air moisture relaxation rate
    r_int = r_int_surf*r_surf  // Internal-to-surface moisture relaxation rate
    j_int = (1-f_surf)*r_int*(w_int-w_surf)  // Moisture-transfer rate from internal to surface compartment
    m_evap = f_surf*r_surf*max(w_surf-w_eq,0[kg/m^3])  // Volumetric evaporation rate (positive: drying)
    Q_evap = -h_fg*m_evap  // Volumetric latent-heat source (negativ: drying)
  var7 "Variables 6 - Global Diagnostics and Stop Criterion"
    m_w_gr = Lz*intop_bed(w_gr)  // Total water mass in granular material
    m_v_gas = Lz*intop_bed(w_v_gas)  // Total water-vapor mass in pore gas
    X_wb_bulk = m_w_gr/(Lz*intop_bed(rho_bu_dry)+m_w_gr)  // Bulk moisture content of granular material on wet basis
    f_wet_dm = intop_bed(rho_bu_dry*if(X_wb>X_target_wb,1,0))/intop_bed(rho_bu_dry)  // Dry-mass fraction above target moisture
    m_dot_evap = Lz*intop_bed(m_evap)  // Integrated evaporation rate from granular material to gas phase
    m_dot_v_in = -mt.ifl1.ntfluxInt  // Net moisture rate at inlet boundary
    m_dot_v_out = mt.ofl1.ntfluxInt  // Net moisture rate at outlet boundary
    T_out_mean = aveop_out(T)  // Boundary-averaged outlet-air temperature
    phi_out_mean = aveop_out(mt.phi)  // Boundery-averaged outlet relative humidity

Couplings
  intop1: Integration "Packed-Bed Integration" on domains 1 | opname = intop_bed
  aveop1: Average "Outlet Average" on boundaries 3 | opname = aveop_out
  maxop1: Maximum "Packed-Bed Maximum" on domains 1 | opname = maxop_bed
  minop1: Minimum "Packed-Bed Minimum" on domains 1 | opname = minop_bed

Geometry
  geom1 "Geometry 1" (2D, length unit m)
    r1: Rectangle | size = {Lx, Ly}
    fin: Finalize "Form Union"

Materials
  mat1: Common "Air" on all domains
    def: def "Basic"
      thermalexpansioncoefficient = alpha_p(pA,T)
      molarmass = 0.02897[kg/mol]
      bulkviscosity = muB(T)
      relpermeability = 1
      relpermittivity = 1
      dynamicviscosity = eta(T)
      ratioofspecificheat = 1.4
      electricconductivity = 0[S/m]
      heatcapacity = Cp(T)
      density = rho(pA,T)
      thermalconductivity = k(T)
      soundspeed = cs(T)
      porosity = eps_bed
      eta: Piecewise | arg = T; pieces = {200.0, 1600.0, -8.38278E-7+8.35717342E-8*T^1-7.69429583E-11*T^2+4.6437266E-14*T^3-1.06585607E-17*T^4}; argunit = K; fununit = Pa*s
      Cp: Piecewise | arg = T; pieces = {200.0, 1600.0, 1047.63657-0.372589265*T^1+9.45304214E-4*T^2-6.02409443E-7*T^3+1.2858961E-10*T^4}; argunit = K; fununit = J/(kg*K)
      rho: Analytic | expr = pA*0.02897/R_const[K*mol/J]/T; args = {pA, T}; fununit = kg/m^3; argunit = {Pa, K}
      k: Piecewise | arg = T; pieces = {200.0, 1600.0, -0.00227583562+1.15480022E-4*T^1-7.90252856E-8*T^2+4.11702505E-11*T^3-7.43864331E-15*T^4}; argunit = K; fununit = W/(m*K)
      cs: Analytic | expr = sqrt(1.4*R_const[K*mol/J]/0.02897*T); args = T; fununit = m/s; argunit = K
      an1: Analytic | funcname = alpha_p; expr = -1/rho(pA,T)*d(rho(pA,T),T); args = {pA, T}; fununit = 1/K; argunit = {Pa, K}
      an2: Analytic "Analytic 2a" | funcname = muB; expr = 0.6*eta(T); args = T; fununit = Pa*s; argunit = K
    RefractiveIndex: RefractiveIndex
      n = 1
      ki = 0
    NonlinearModel: NonlinearModel
      BA = def.gamma-1
    idealGas: idealGas
      Rs = R_const/Mn
      heatcapacity = Cp(T)
      ratioofspecificheat = 1.4
      molarmass = 0.02897[kg/mol]
      Cp: Piecewise | arg = T; pieces = {200.0, 1600.0, 1047.63657-0.372589265*T^1+9.45304214E-4*T^2-6.02409443E-7*T^3+1.2858961E-10*T^4}; argunit = K; fununit = J/(kg*K)

Physics
  br: PorousMediaFlowBrinkman "Brinkman Equations" on all domains
    dependent variable u = {u, v, w}
    PhysicalModelProperty.PorousWallTreatment = PorousResolvedWall
    PhysicalModelProperty.Tref = T_flow_ref
    PhysicalModelProperty.pref = p_ref
    TurbulenceModelProperty.c4_PS_om = ((9*0.52)+6)/11
    TurbulenceModelProperty.c5_PS_om = (10-(7*0.52))/11
    porous1: PorousMedium (default)
      fluid1: FluidPorousMedium "Fluid 1" (default) | minput_temperature = T_flow_ref
      pm1: PorousMatrixPorousMedium "Porous Matrix 1" (default)
        epsilon_p_mat = userdef
        epsilon_p = eps_bed
        kappa_mat = userdef
        kappa = {Kxx, Kxy, 0, Kxy, Kyy, 0, 0, 0, Kxx}
        minput_temperature = T_flow_ref
    init1: init "Initial Values 1" (default)
    wallbc1: WallBC "Wall 1" (default) | zeta = (-0.1)[V]
    inl1: InletBoundary "Inlet 1" on boundaries 2 | BoundaryCondition = Pressure; p0 = p_in_bc
    out1: OutletBoundary "Outlet 1" on boundaries 3 | p0 = p_out
  mt: MoistureTransportPorousMedia "Equilibrium Moisture Transport in Porous Media" on all domains
    dependent variable relativehumidity
    PhysicalModelProperty.dz = Lz
    hporous1: HygroscopicPorousMediumModel "Hygroscopic Porous Medium 1" (default)
      wc_mat = userdef
      wc = w_v_gas
      minput_temperature_src = root.comp1.T
      minput_pressure_src = root.comp1.br.pA
      lw1: LiquidWaterHygroscopicPorousMediumModel "Liquid Water 1" (default)
        kappa_rl = 0
        capillaryConductionModel = userdef
      ma1: MoistAirHygroscopicPorousMediumModel "Moist Air 1" (default)
        D = D_v_air
        kappa_rg = 1
        ug_src = root.comp1.u
        FluidDiffusivityModelType = BruggemanModel
      pm1: PorousMatrixHygroscopicPorousMediumModel "Porous Matrix 1" (default)
        poro_mat = userdef
        poro = eps_bed
        kappa_mat = userdef
        kappa = {Kxx, Kxy, 0, Kxy, Kyy, 0, 0, 0, Kxx}
    init1: InitialValues (default) | phi_init = phi_init
    ins1: Insulation (default)
    ifl1: Inflow on boundaries 2 | phiustr = phi_in_bc; Tustr = T_in_bc
    ofl1: Outflow on boundaries 3
    ms1: MoistureSource on domains 1 | G0 = m_evap
  ht: MoistPorousMediaHeatTransfer "Heat Transfer in Moist Porous Media" on all domains
    dependent variable T
    PhysicalModelProperty.dz = Lz
    PhysicalModelProperty.Tref = T_flow_ref
    mporous1: MoistPorousMediumHeatTransferModel "Moist Porous Medium 1" (default)
      EffectiveConductivity = EquivalentThermalConductivity
      k_eqt_mat = userdef
      k_eqt = k_eff
      lw1: LiquidWaterMoistPorousMediumHeatTransferModel "Liquid Water 1" (default)
        minput_pressure_src = root.comp1.br.pA
      ma1: MoistAirMoistPorousMediumHeatTransferModel "Moist Air 1" (default)
        ug_src = root.comp1.u
        phi_cond_match_src = root.comp1.mt.phi_condition
        T_cond_match_src = root.comp1.mt.T_condition
        p_cond_match_src = root.comp1.mt.p_condition
        minput_pressure_src = root.comp1.br.pA
      pm1: PorousMatrixPorousMediumHeatTransferModel "Porous Matrix 1" (default)
        porousMatrixPropertiesType = solidPhaseProperties
        poro_mat = userdef
        poro = eps_bed
        k_b_mat = userdef
        k_b = k_bulk
        k_sp_mat = userdef
        k_sp = 0.25
        rho_b_mat = userdef
        rho_b = rho_bu_dry
        rho_sp_mat = userdef
        rho_sp = rho_bu_dry/(1-eps_bed)
        Cp_b_mat = userdef
        Cp_b = cp_gr_eff
        Cp_sp_mat = userdef
        Cp_sp = cp_gr_eff
        minput_pressure_src = root.comp1.br.pA
    init1: init "Initial Values 1" (default) | Tinit = T_init
    ins1: ThermalInsulation (default)
    hf2: HeatFluxBoundary "Heat Flux 1" on boundaries 1, 4 | HeatFluxType = ConvectiveHeatFlux; h = U_wall; Text = T_amb
    ifl1: Inflow on boundaries 2 | Tustr = T_in_bc
    ofl1: ConvectiveOutflow "Outflow 1" on boundaries 3
    hs1: HeatSource on domains 1 | Q0 = Q_evap
  dode: DomainODE "Domain ODEs and DAEs" on all domains
    dependent variable w_comp = {w_surf, w_int}
    EquationForm.form = Automatic
    Units.DependentVariableQuantity = none
    Units.CustomDependentVariableUnit = kg/m^3
    Units.CustomSourceTermUnit = kg/(m^3*s)
    dode1: DistributedODE (default) | f = {j_int-m_evap, -j_int}; da = {f_surf, 0, 0, 1- f_surf}
    init1: init "Initial Values 1" (default) | w_int = w_gr_0; w_surf = w_gr_0

Mesh
  mesh1 "Mesh 1"
    size: MeshSizeDefault | table = cfd
    size1: Size (disabled) on boundaries 1, 4 | table = cfd; hauto = 1
    cr1: CornerRefinement (disabled) on domains 1 | boundary = boundaries 1, 4
    ftri1: FreeTri "Free Triangular 1" (disabled) on remaining entities | smoothcontrol = on
    bl1: BndLayer "Boundary Layers 1" (disabled) on domains 1 | sharpcorners = trim
      blp1: BndLayerProp "Boundary Layer Properties 1" on boundaries 1, 4 | blnlayers = 2; blhminfact = 5
    dis1: Distribution on boundaries 2, 3 | numelem = Nx-1; equidistant = on
    dis2: Distribution on boundaries 1, 4 | numelem = Ny-1; equidistant = on
    map1: Map "Mapped 1" on domains 1 | smoothcontrol = on
    bl2: BndLayer "Boundary Layers 2" on entire geometry
      blp: BndLayerProp "Boundary Layer Properties" on boundaries 1, 4

Studies
  std1 "Stationary Airflow"
    stat: Stationary "Stationary Airflow Solver" | solve for = {br, comp1}
  std2 "Transient Drying"
    time: Transient "Transient Drying Solver"
      tunit = h
      tlist = range(0,dt_out, t_max)
      solve for = {mt, ht, dode, comp1}
      useinitsol = on
      usesol = on
      notsolmethod = sol
      notstudy = std1

Solver configurations
  sol1 "Stationary Airflow Solution" (study std1)
    v1: Variables "Dependent Variables 1"
    s1: Stationary "Stationary Solver 1"
      fc1: FullyCoupled
      d1: Direct "Direct, fluid flow variables (br)"
  sol2 "Transient Drying Solution" (study std2)
    v1: Variables "Dependent Variables 1" | notsolmethod = sol
      comp1_mt_phi: Field "Relative Humidity (comp1.mt.phi)" | scalemethod = manual; resscalemethod = manual
    t1: Time "Time-Dependent Solver 1" | tunit = h; tlist = range(0,dt_out, t_max); maxorder = 2; estrat = exclude
      fc1: FullyCoupled
        linsolver = d1
        maxiter = 5
        ntolfact = 0.01
        jtech = once
        stabacc = aacc
        aaccdim = 5
        aaccmix = 0.9
        damp = 0.7
      d1: Direct "Direct (Merged)"
      st1: StopCondition "Stop at Target Moisture"
        stopcondterminateon = true
        stopconddesc = Dry-mass fraction above target moisture reached the configured limit
        stopcondarr = comp1.f_wet_dm <= f_wet_dm_max

Datasets
  dset1: Solution | solution = sol1
  dset2: Solution | solution = sol2
  cpt1: CutPoint2D
    data = dset2
    pointx = 0.1, 0.6, 1.1, 0.1, 0.6, 1.1, 0.1, 0.6, 1.1
    pointy = 0.1, 0.1, 0.1, 0.375, 0.375, 0.375, 0.65, 0.65, 0.65
  cpt2: CutPoint2D | data = dset2; pointx = 0.6, 0.6, 0.6; pointy = 0.1, 0.375, 0.65; pointvar = cpt1n

Derived values
  gev1: EvalGlobal "Evaluate Final Status"
    data = dset2
    expr = {t, comp1.f_wet_dm, comp1.X_wb_bulk, comp1.maxop_bed(comp1.X_wb), comp1.minop_bed(comp1.T), comp1.maxop_bed(comp1.T), comp1.minop_bed(comp1.mt.phi), comp1.maxop_bed(comp1.mt.phi)}
    unit = {h, 1, 1, , , , , }
    descr = {t_final, f_wet_dm_final, X_wb_bulk_final, X_wb_max_final, T_min_final, T_max_final, phi_min_final, phi_max_final}
  gev2: EvalGlobal "Evaluate Global Time Series"
    data = dset2
    expr = {t, comp1.X_wb_bulk, comp1.f_wet_dm, comp1.m_w_gr, comp1.m_v_gas, comp1.m_dot_evap, comp1.m_dot_v_in, comp1.m_dot_v_out, comp1.mt.massBalance, comp1.T_out_mean, comp1.phi_out_mean}
    unit = {h, 1, 1, kg, kg, kg/s, kg/s, kg/s, kg/s, K, 1}
    descr = {t, X_wb_bulk, f_wet_dm, m_w_gr, m_v_gas, m_dot_evap, m_dot_v_in, m_dot_v_out, mt_mass_balance, T_out_mean, phi_out_mean}

Plots
  pg14: PlotGroup2D "Porosity (eps_bed)" | data = dset1
    surf1: Surface | expr = eps_bed
  pg2: PlotGroup2D "Pressure (br)" | data = dset1
    surf1: Surface | expr = p
  pg1: PlotGroup2D "Velocity (br)" | data = dset1
    surf1: Surface | expr = br.U
    arws1: ArrowSurface (disabled) | expr = {u, v}; xnumber = 30; ynumber = 30; arrowlength = normalized
    str1: Streamline on boundaries 2
      expr = {u, v}
      pointtype = arrow
      arrowdistr = equaltime
      arrowcount = 77
      arrowlength = proportional
      arrowscale = 0.286761767626
  pg3: PlotGroup2D "Temperature (ht)" | data = dset2
    surf1: Surface | expr = T; unit = °C
  pg4: PlotGroup2D "Relative humidity (mt)" | data = dset2
    surf1: Surface | expr = mt.phi; unit = %
  pg7: PlotGroup2D "Humidity porous medium extern (mte)" | data = dset2
    surf1: Surface | expr = w_surf
  pg8: PlotGroup2D "Humidity porous medium intern (mti)" | data = dset2
    surf1: Surface | expr = w_int
  pg13: PlotGroup2D "Moisture content of granular material, wet basis(X_wb)" | data = dset2
    surf1: Surface | expr = X_wb
  pg11: PlotGroup2D "Moisture transport from internal to surface (j_int)" | data = dset2
    surf1: Surface | expr = j_int
  pg5: PlotGroup1D "1D Plot Group Humidity" | data = cpt1
    ptgr1: PointGraph "Point Graph Humidity" | expr = X_db/(1+X_db)
  pg6: PlotGroup1D "1D Plot Group Humidity & Temperature middle 3 heights" | data = cpt2; yseclabel = Temperature (°C)
    ptgr1: PointGraph "Point Graph Humidity" | expr = X_db/(1+X_db)
    ptgr2: PointGraph "Point Graph Temperature" on points 1-4 | expr = T; unit = °C
  pg10: PlotGroup1D "1D Plot Group Moisture transport from internal to surface" | data = cpt1
    ptgr1: PointGraph "Point Graph Moisture transport from internal to surface" | expr = j_int

Exports
  data1: Data "Export - Stationary Fields"
    data = dset1
    expr = {x, y, Kxx, Kxy, Kyy, eps_bed, p_in_bc, X_0_db_field, rho_bu_dry, p, u, v}
    unit = {m, m, m^2, m^2, m^2, , Pa, kg/kg, kg/m^3, Pa, m/s, m/s}
    descr = {x-coordinate, y-coordinate, Local xx-component of permeability tensor, Local xy-component of permeability tensor, Local yy-component of permeability tensor, Porosity, Pressure on boundary, Local initial moisture content of the granular material on dry basis, Local dry granular-material mass per total packed-bed volume, Pressure, "Velocity field, x-component", "Velocity field, y-component"}
    filename = exports/stationary_fields.csv
    location = grid
    gridx2 = range(0,(Lx-0)/(Nx-1),Lx)
    gridy2 = range(0,(Ly-0)/(Ny-1),Ly)
    includecoords = off
    separator = ,
  data2: Data "Export - Transient States"
    data = dset2
    expr = {t, x, y, T, mt.phi, w_surf, w_int}
    unit = {h, m, m, K, 1, kg/m^3, kg/m^3}
    descr = {Time, x-coordinate, y-coordinate, Temperature, Relative humidity, Dependent variable w_surf, Dependent variable w_int}
    filename = exports/transient_states.csv
    location = grid
    gridx2 = range(0,(Lx-0)/(Nx-1),Lx)
    gridy2 = range(0,(Ly-0)/(Ny-1),Ly)
    includecoords = off
    separator = ,
  tbl2: Table "Export - Global Time Series" | table = tbl2; filename = exports/global_timeseries.csv
  tbl1: Table "Export - Final Status" | table = tbl1; filename = exports/final_status.csv